# Bulk Lennard-Jones liquid: bin-resolved planar structure factor S_ij(k_parallel)
# Proof-of-concept input for the Ornstein-Zernike inversion described in
# examples/PACKAGES/structure_factor_2d/README.
#
# The box is cubic, so Lx == Ly (required by compute structure/factor/2d).
# Because the fluid is homogeneous, the inverted direct correlation function
# C_ij(k) must be translationally invariant in z; its z-Fourier transform
# recovers the bulk c(k), which is cross-checked against (1 - 1/S(q))/rho from
# the radial distribution function (rdf_bulk.out).

units           lj
atom_style      atomic

variable        rho   index 0.80      # reduced number density
variable        temp  index 0.90      # reduced temperature (liquid)
variable        kmax  index 8         # max reciprocal-lattice index (circular cutoff)
variable        nbins index 8         # number of z-bins

lattice         fcc ${rho}
region          box block 0 8 0 8 0 8     # cubic -> Lx == Ly == Lz
create_box      1 box
create_atoms    1 box
mass            1 1.0

velocity        all create ${temp} 87287 loop geom

pair_style      lj/cut 4.0
pair_coeff      1 1 1.0 1.0

neighbor        0.3 bin
neigh_modify    every 10 delay 0 check yes

fix             1 all nvt temp ${temp} ${temp} 0.5
timestep        0.005

# equilibration

thermo          200
run             5000

# production: accumulate time-averaged S_ij(k) and g(r)

compute         sf  all structure/factor/2d ${kmax} ${nbins}
compute         rdf all rdf 200 1 1

fix             sfavg  all ave/time 10 500 5000 c_sf[*]  mode vector file sf_bulk.out
fix             rdfavg all ave/time 10 500 5000 c_rdf[*] mode vector file rdf_bulk.out

run             5000
